# OpenSim document version 30000
Model JumpModelwContact:
  length_units: meters
  force_units: N
  gravity: 0 -9.80665 0
  credits:
    Frank Anderson, Peter Loan, Ayman Habib, Ajay Seth, Michael Sherman
  BodySet:
    Body ground: mass=0 mass_center=(0 0 0) inertia_xx=1 inertia_yy=1 inertia_zz=1 meshes=treadmill.vtp
    Body Pelvis: mass=11.777 mass_center=(0 0.0661 0) inertia_xx=0.1028 inertia_yy=0.0871 inertia_zz=0.0579
        meshes=cylinder.vtp
      PlanarJoint GroundPelvis: parent_body=ground location_in_parent=(0 0 0) location=(0 0 0)
        Coordinate GroundPelvis_Rot: motion_type=translational default_value=-0.344 range=(-3.141593 3.141593)
        Coordinate GroundPelvis_XTrans: default_value=0 range=(-1 1)
        Coordinate GroundPelvis_YTrans: default_value=0.243648 range=(-1 1)
    Body Thigh: mass=9.3014 mass_center=(0 -0.17 0) inertia_xx=0.1339 inertia_yy=0.0351 inertia_zz=0.1412
        meshes=cylinder.vtp
      CustomJoint Hip: parent_body=Pelvis location_in_parent=(0 0 0.0355) location=(0 0 0)
        Coordinate Hip_extension: motion_type=rotational default_value=0 range=(-1.134464 1.134464) clamped=false
        Coordinate Hip_abduction: motion_type=rotational default_value=0 range=(-0.7853982 0.7853982) clamped=false
        Coordinate Hip_rotation: motion_type=rotational default_value=0 range=(-0.7853982 0.7853982) clamped=false
        SpatialTransform: axes_held_at_zero=(translation1 translation2 translation3)
          TransformAxis rotation1: coordinates=Hip_extension axis=(0 0 1) LinearFunction(coefficients=1 0)
          TransformAxis rotation2: coordinates=Hip_abduction axis=(1 0 0) LinearFunction(coefficients=1 0)
          TransformAxis rotation3: coordinates=Hip_rotation axis=(0 1 0) LinearFunction(coefficients=1 0)
    Body Shank: mass=3.7075 mass_center=(0 -0.1867 0) inertia_xx=0.0504 inertia_yy=0.0051 inertia_zz=0.0511
        meshes=cylinder.vtp
      CustomJoint Knee: parent_body=Thigh location_in_parent=(0 -0.397 0) location=(0 0 0)
        Coordinate Knee_extension: motion_type=rotational default_value=0 range=(-1.134464 1.134464) clamped=false
        Coordinate Knee_abduction: motion_type=rotational default_value=0 range=(-0.7853982 0.7853982) clamped=false
        Coordinate Knee_rotation: motion_type=rotational default_value=0 range=(-0.7853982 0.7853982) clamped=false
        SpatialTransform: axes_held_at_zero=(translation1 translation2 translation3)
          TransformAxis rotation1: coordinates=Knee_extension axis=(0 0 1) LinearFunction(coefficients=1 0)
          TransformAxis rotation2: coordinates=Knee_abduction axis=(1 0 0) LinearFunction(coefficients=1 0)
          TransformAxis rotation3: coordinates=Knee_rotation axis=(0 1 0) LinearFunction(coefficients=1 0)
    Body Foot: mass=1.566 mass_center=(0.13 0 0) inertia_xx=0.0015 inertia_yy=0.0039 inertia_zz=0.0041
        meshes=cylinder.vtp
      CustomJoint Ankle: parent_body=Shank location_in_parent=(0 -0.43 0) location=(0 0 0)
        Coordinate Ankle_extension: motion_type=rotational default_value=0 range=(-1.134464 1.134464) clamped=false
        Coordinate Ankle_abduction: motion_type=rotational default_value=0 range=(-0.7853982 0.7853982) clamped=false
        Coordinate Ankle_rotation: motion_type=rotational default_value=0 range=(-0.7853982 0.7853982) clamped=false
        SpatialTransform: axes_held_at_zero=(translation1 translation2 translation3)
          TransformAxis rotation1: coordinates=Ankle_extension axis=(0 0 1) LinearFunction(coefficients=1 0)
          TransformAxis rotation2: coordinates=Ankle_abduction axis=(1 0 0) LinearFunction(coefficients=1 0)
          TransformAxis rotation3: coordinates=Ankle_rotation axis=(0 1 0) LinearFunction(coefficients=1 0)
  ForceSet:
    CoordinateLimitForce Ankle_Rot_LimitForce: coordinate=Ankle_extension upper_stiffness=0.08 [N*m/degree]
        upper_limit=1.134464 [degrees] lower_stiffness=0.08 [N*m/degree] lower_limit=-1.134464 [degrees] damping=3
        transition=5 [degrees] compute_dissipation_energy=false
    CoordinateLimitForce Knee_Rot_LimitForce: coordinate=Knee_extension upper_stiffness=0.08 upper_limit=0
        lower_stiffness=0.08 lower_limit=-3.054326 damping=3 transition=5 compute_dissipation_energy=false
    CoordinateLimitForce Hip_Rot_LimitForce: coordinate=Hip_extension upper_stiffness=0.08 upper_limit=2.96706
        lower_stiffness=0.08 lower_limit=0 damping=3 transition=5 compute_dissipation_energy=false
    CoordinateActuator Hip_Torque: min_control=-1 max_control=1 coordinate=Hip_extension optimal_force=1000
    CoordinateActuator Knee_Torque: min_control=-1 max_control=1 coordinate=Knee_extension optimal_force=1000
    CoordinateActuator Ankle_Torque: min_control=-1 max_control=1 coordinate=Ankle_extension optimal_force=1000
    HuntCrossleyForce GroundContactForce:
      ContactParametersSet contact_parameters:
        ContactParameters: geometry=(GroundContact FootContact1 FootContact2) stiffness=10000000 dissipation=0.3
            static_friction=0.6 dynamic_friction=0.4 viscous_friction=0.01
  ContactGeometrySet:
    ContactHalfSpace GroundContact: body_name=ground location=(0 0 0) orientation=(0 0 -1.570796)
    ContactSphere FootContact1: body_name=Foot location=(0 0 0) radius=0
    ContactSphere FootContact2: body_name=Foot location=(0.21 0 0) radius=0
  ControllerSet Controllers:
    PrescribedController Optimal Torque Controls: actuator_list=(Hip_Torque Knee_Torque Ankle_Torque)
      FunctionSet ControlFunctions:
        SimmSpline Optimal Hip_Torque Controller: x=(0 0.01 0.02 0.03 0.04 0.05 0.06 0.07 0.08 0.09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)
            y=(0.02 0.020019 0.0200758 0.0201704 0.0203022 0.0204707 0.0206754 0.0209154 0.0211897 0.0214973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)
        SimmSpline Optimal Knee_Torque Controller: x=(0 0.01 0.02 0.03 0.04 0.05 0.06 0.07 0.08 0.09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)
            y=(-0.02 -0.0200197 -0.0200789 -0.0201771 -0.0203142 -0.0204894 -0.0207022 -0.0209517 -0.0212369 -0.0215567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)
        SimmSpline Optimal Ankle_Torque Controller: x=(0 0.01 0.02 0.03 0.04 0.05 0.06 0.07 0.08 0.09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)
            y=(0.02 0.0200197 0.0200789 0.0201771 0.0203142 0.0204894 0.0207022 0.0209517 0.0212369 0.0215567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)
